<Lems>

    <!--

        This LEMS file has been automatically generated using PyNeuroML v0.1.7 (libNeuroML v0.2.11)

     -->

    <!-- Specify which component to run -->
    <Target component="Golgi_V2012_test1_trial3"/>

    <!-- Include core NeuroML2 ComponentType definitions -->
    <Include file="Cells.xml"/>
    <Include file="Networks.xml"/>
    <Include file="Simulation.xml"/>

    <Include file="Golgi_V2012_test1_trial3.net.nml"/>
    <Include file="/../../../Very_Simple_Golgi_test_morph.cell.nml"/>
    <Include file="Golgi_NaT.channel.nml"/>
    <Include file="Golgi_KV.channel.nml"/>
    <Include file="LeakCond.channel.nml"/>
    <Include file="/../../../PFSpikeSyn.synapse.nml"/>

    <Simulation id="Golgi_V2012_test1_trial3" length="450ms" step="0.005ms" target="Golgi_V2012_test1_trial3_network">

        <Display id="display_voltagesGolgi_pop0" title="Voltages Golgi_pop0" timeScale="1ms" xmin="-45.0" xmax="495.0" ymin="-75" ymax="50">
            <Line id="../Golgi_pop0/0: Vm" quantity="Golgi_pop0/0/Very_Simple_Golgi_test_morph/v" scale="1mV" color="#21b5b2" timeScale="1ms"/>
            <Line id="../Golgi_pop0/1: Vm" quantity="Golgi_pop0/1/Very_Simple_Golgi_test_morph/v" scale="1mV" color="#8bebf7" timeScale="1ms"/>
            <Line id="../Golgi_pop0/2: Vm" quantity="Golgi_pop0/2/Very_Simple_Golgi_test_morph/v" scale="1mV" color="#605e08" timeScale="1ms"/>
            <Line id="../Golgi_pop0/3: Vm" quantity="Golgi_pop0/3/Very_Simple_Golgi_test_morph/v" scale="1mV" color="#492ec8" timeScale="1ms"/>
            <Line id="../Golgi_pop0/4: Vm" quantity="Golgi_pop0/4/Very_Simple_Golgi_test_morph/v" scale="1mV" color="#17a581" timeScale="1ms"/>
            <Line id="../Golgi_pop0/5: Vm" quantity="Golgi_pop0/5/Very_Simple_Golgi_test_morph/v" scale="1mV" color="#a7210f" timeScale="1ms"/>
            <Line id="../Golgi_pop0/6: Vm" quantity="Golgi_pop0/6/Very_Simple_Golgi_test_morph/v" scale="1mV" color="#2bf70f" timeScale="1ms"/>
            <Line id="../Golgi_pop0/7: Vm" quantity="Golgi_pop0/7/Very_Simple_Golgi_test_morph/v" scale="1mV" color="#d726bc" timeScale="1ms"/>
            <Line id="../Golgi_pop0/8: Vm" quantity="Golgi_pop0/8/Very_Simple_Golgi_test_morph/v" scale="1mV" color="#a95dd7" timeScale="1ms"/>
            <Line id="../Golgi_pop0/9: Vm" quantity="Golgi_pop0/9/Very_Simple_Golgi_test_morph/v" scale="1mV" color="#14b761" timeScale="1ms"/>
            <Line id="../Golgi_pop0/10: Vm" quantity="Golgi_pop0/10/Very_Simple_Golgi_test_morph/v" scale="1mV" color="#00d2fe" timeScale="1ms"/>
            <Line id="../Golgi_pop0/11: Vm" quantity="Golgi_pop0/11/Very_Simple_Golgi_test_morph/v" scale="1mV" color="#b8b85b" timeScale="1ms"/>
            <Line id="../Golgi_pop0/12: Vm" quantity="Golgi_pop0/12/Very_Simple_Golgi_test_morph/v" scale="1mV" color="#21e0fd" timeScale="1ms"/>
            <Line id="../Golgi_pop0/13: Vm" quantity="Golgi_pop0/13/Very_Simple_Golgi_test_morph/v" scale="1mV" color="#e7974b" timeScale="1ms"/>
            <Line id="../Golgi_pop0/14: Vm" quantity="Golgi_pop0/14/Very_Simple_Golgi_test_morph/v" scale="1mV" color="#fccce8" timeScale="1ms"/>
        </Display>

        <Display id="display_voltagesGolgi_pop1" title="Voltages Golgi_pop1" timeScale="1ms" xmin="-45.0" xmax="495.0" ymin="-75" ymax="50">
            <Line id="../Golgi_pop1/0: Vm" quantity="Golgi_pop1/0/Very_Simple_Golgi_test_morph/v" scale="1mV" color="#38f891" timeScale="1ms"/>
            <Line id="../Golgi_pop1/1: Vm" quantity="Golgi_pop1/1/Very_Simple_Golgi_test_morph/v" scale="1mV" color="#49788e" timeScale="1ms"/>
            <Line id="../Golgi_pop1/2: Vm" quantity="Golgi_pop1/2/Very_Simple_Golgi_test_morph/v" scale="1mV" color="#fd120e" timeScale="1ms"/>
            <Line id="../Golgi_pop1/3: Vm" quantity="Golgi_pop1/3/Very_Simple_Golgi_test_morph/v" scale="1mV" color="#6369cf" timeScale="1ms"/>
            <Line id="../Golgi_pop1/4: Vm" quantity="Golgi_pop1/4/Very_Simple_Golgi_test_morph/v" scale="1mV" color="#148298" timeScale="1ms"/>
            <Line id="../Golgi_pop1/5: Vm" quantity="Golgi_pop1/5/Very_Simple_Golgi_test_morph/v" scale="1mV" color="#98adff" timeScale="1ms"/>
            <Line id="../Golgi_pop1/6: Vm" quantity="Golgi_pop1/6/Very_Simple_Golgi_test_morph/v" scale="1mV" color="#f1cf1d" timeScale="1ms"/>
            <Line id="../Golgi_pop1/7: Vm" quantity="Golgi_pop1/7/Very_Simple_Golgi_test_morph/v" scale="1mV" color="#837a3a" timeScale="1ms"/>
            <Line id="../Golgi_pop1/8: Vm" quantity="Golgi_pop1/8/Very_Simple_Golgi_test_morph/v" scale="1mV" color="#83d79a" timeScale="1ms"/>
            <Line id="../Golgi_pop1/9: Vm" quantity="Golgi_pop1/9/Very_Simple_Golgi_test_morph/v" scale="1mV" color="#59fa78" timeScale="1ms"/>
            <Line id="../Golgi_pop1/10: Vm" quantity="Golgi_pop1/10/Very_Simple_Golgi_test_morph/v" scale="1mV" color="#e87ba4" timeScale="1ms"/>
            <Line id="../Golgi_pop1/11: Vm" quantity="Golgi_pop1/11/Very_Simple_Golgi_test_morph/v" scale="1mV" color="#cae093" timeScale="1ms"/>
            <Line id="../Golgi_pop1/12: Vm" quantity="Golgi_pop1/12/Very_Simple_Golgi_test_morph/v" scale="1mV" color="#de7af0" timeScale="1ms"/>
            <Line id="../Golgi_pop1/13: Vm" quantity="Golgi_pop1/13/Very_Simple_Golgi_test_morph/v" scale="1mV" color="#41a9d6" timeScale="1ms"/>
            <Line id="../Golgi_pop1/14: Vm" quantity="Golgi_pop1/14/Very_Simple_Golgi_test_morph/v" scale="1mV" color="#6eed70" timeScale="1ms"/>
        </Display>

        <OutputFile id="Volts0_file0_0" fileName="/home/rokas/Golgi_network_2016/PyExamples/simulations/V2012_test1/sim3/Golgi_pop0_cell0.dat">
            <OutputColumn id="v0" quantity="Golgi_pop0/0/Very_Simple_Golgi_test_morph/v"/>
        </OutputFile>

        <OutputFile id="Volts0_file0_1" fileName="/home/rokas/Golgi_network_2016/PyExamples/simulations/V2012_test1/sim3/Golgi_pop0_cell1.dat">
            <OutputColumn id="v1" quantity="Golgi_pop0/1/Very_Simple_Golgi_test_morph/v"/>
        </OutputFile>

        <OutputFile id="Volts0_file0_2" fileName="/home/rokas/Golgi_network_2016/PyExamples/simulations/V2012_test1/sim3/Golgi_pop0_cell2.dat">
            <OutputColumn id="v2" quantity="Golgi_pop0/2/Very_Simple_Golgi_test_morph/v"/>
        </OutputFile>

        <OutputFile id="Volts0_file0_3" fileName="/home/rokas/Golgi_network_2016/PyExamples/simulations/V2012_test1/sim3/Golgi_pop0_cell3.dat">
            <OutputColumn id="v3" quantity="Golgi_pop0/3/Very_Simple_Golgi_test_morph/v"/>
        </OutputFile>

        <OutputFile id="Volts0_file0_4" fileName="/home/rokas/Golgi_network_2016/PyExamples/simulations/V2012_test1/sim3/Golgi_pop0_cell4.dat">
            <OutputColumn id="v4" quantity="Golgi_pop0/4/Very_Simple_Golgi_test_morph/v"/>
        </OutputFile>

        <OutputFile id="Volts0_file0_5" fileName="/home/rokas/Golgi_network_2016/PyExamples/simulations/V2012_test1/sim3/Golgi_pop0_cell5.dat">
            <OutputColumn id="v5" quantity="Golgi_pop0/5/Very_Simple_Golgi_test_morph/v"/>
        </OutputFile>

        <OutputFile id="Volts0_file0_6" fileName="/home/rokas/Golgi_network_2016/PyExamples/simulations/V2012_test1/sim3/Golgi_pop0_cell6.dat">
            <OutputColumn id="v6" quantity="Golgi_pop0/6/Very_Simple_Golgi_test_morph/v"/>
        </OutputFile>

        <OutputFile id="Volts0_file0_7" fileName="/home/rokas/Golgi_network_2016/PyExamples/simulations/V2012_test1/sim3/Golgi_pop0_cell7.dat">
            <OutputColumn id="v7" quantity="Golgi_pop0/7/Very_Simple_Golgi_test_morph/v"/>
        </OutputFile>

        <OutputFile id="Volts0_file0_8" fileName="/home/rokas/Golgi_network_2016/PyExamples/simulations/V2012_test1/sim3/Golgi_pop0_cell8.dat">
            <OutputColumn id="v8" quantity="Golgi_pop0/8/Very_Simple_Golgi_test_morph/v"/>
        </OutputFile>

        <OutputFile id="Volts0_file0_9" fileName="/home/rokas/Golgi_network_2016/PyExamples/simulations/V2012_test1/sim3/Golgi_pop0_cell9.dat">
            <OutputColumn id="v9" quantity="Golgi_pop0/9/Very_Simple_Golgi_test_morph/v"/>
        </OutputFile>

        <OutputFile id="Volts0_file0_10" fileName="/home/rokas/Golgi_network_2016/PyExamples/simulations/V2012_test1/sim3/Golgi_pop0_cell10.dat">
            <OutputColumn id="v10" quantity="Golgi_pop0/10/Very_Simple_Golgi_test_morph/v"/>
        </OutputFile>

        <OutputFile id="Volts0_file0_11" fileName="/home/rokas/Golgi_network_2016/PyExamples/simulations/V2012_test1/sim3/Golgi_pop0_cell11.dat">
            <OutputColumn id="v11" quantity="Golgi_pop0/11/Very_Simple_Golgi_test_morph/v"/>
        </OutputFile>

        <OutputFile id="Volts0_file0_12" fileName="/home/rokas/Golgi_network_2016/PyExamples/simulations/V2012_test1/sim3/Golgi_pop0_cell12.dat">
            <OutputColumn id="v12" quantity="Golgi_pop0/12/Very_Simple_Golgi_test_morph/v"/>
        </OutputFile>

        <OutputFile id="Volts0_file0_13" fileName="/home/rokas/Golgi_network_2016/PyExamples/simulations/V2012_test1/sim3/Golgi_pop0_cell13.dat">
            <OutputColumn id="v13" quantity="Golgi_pop0/13/Very_Simple_Golgi_test_morph/v"/>
        </OutputFile>

        <OutputFile id="Volts0_file0_14" fileName="/home/rokas/Golgi_network_2016/PyExamples/simulations/V2012_test1/sim3/Golgi_pop0_cell14.dat">
            <OutputColumn id="v14" quantity="Golgi_pop0/14/Very_Simple_Golgi_test_morph/v"/>
        </OutputFile>

        <OutputFile id="Volts1_file0_0" fileName="/home/rokas/Golgi_network_2016/PyExamples/simulations/V2012_test1/sim3/Golgi_pop1_cell0.dat">
            <OutputColumn id="v0" quantity="Golgi_pop1/0/Very_Simple_Golgi_test_morph/v"/>
        </OutputFile>

        <OutputFile id="Volts1_file0_1" fileName="/home/rokas/Golgi_network_2016/PyExamples/simulations/V2012_test1/sim3/Golgi_pop1_cell1.dat">
            <OutputColumn id="v1" quantity="Golgi_pop1/1/Very_Simple_Golgi_test_morph/v"/>
        </OutputFile>

        <OutputFile id="Volts1_file0_2" fileName="/home/rokas/Golgi_network_2016/PyExamples/simulations/V2012_test1/sim3/Golgi_pop1_cell2.dat">
            <OutputColumn id="v2" quantity="Golgi_pop1/2/Very_Simple_Golgi_test_morph/v"/>
        </OutputFile>

        <OutputFile id="Volts1_file0_3" fileName="/home/rokas/Golgi_network_2016/PyExamples/simulations/V2012_test1/sim3/Golgi_pop1_cell3.dat">
            <OutputColumn id="v3" quantity="Golgi_pop1/3/Very_Simple_Golgi_test_morph/v"/>
        </OutputFile>

        <OutputFile id="Volts1_file0_4" fileName="/home/rokas/Golgi_network_2016/PyExamples/simulations/V2012_test1/sim3/Golgi_pop1_cell4.dat">
            <OutputColumn id="v4" quantity="Golgi_pop1/4/Very_Simple_Golgi_test_morph/v"/>
        </OutputFile>

        <OutputFile id="Volts1_file0_5" fileName="/home/rokas/Golgi_network_2016/PyExamples/simulations/V2012_test1/sim3/Golgi_pop1_cell5.dat">
            <OutputColumn id="v5" quantity="Golgi_pop1/5/Very_Simple_Golgi_test_morph/v"/>
        </OutputFile>

        <OutputFile id="Volts1_file0_6" fileName="/home/rokas/Golgi_network_2016/PyExamples/simulations/V2012_test1/sim3/Golgi_pop1_cell6.dat">
            <OutputColumn id="v6" quantity="Golgi_pop1/6/Very_Simple_Golgi_test_morph/v"/>
        </OutputFile>

        <OutputFile id="Volts1_file0_7" fileName="/home/rokas/Golgi_network_2016/PyExamples/simulations/V2012_test1/sim3/Golgi_pop1_cell7.dat">
            <OutputColumn id="v7" quantity="Golgi_pop1/7/Very_Simple_Golgi_test_morph/v"/>
        </OutputFile>

        <OutputFile id="Volts1_file0_8" fileName="/home/rokas/Golgi_network_2016/PyExamples/simulations/V2012_test1/sim3/Golgi_pop1_cell8.dat">
            <OutputColumn id="v8" quantity="Golgi_pop1/8/Very_Simple_Golgi_test_morph/v"/>
        </OutputFile>

        <OutputFile id="Volts1_file0_9" fileName="/home/rokas/Golgi_network_2016/PyExamples/simulations/V2012_test1/sim3/Golgi_pop1_cell9.dat">
            <OutputColumn id="v9" quantity="Golgi_pop1/9/Very_Simple_Golgi_test_morph/v"/>
        </OutputFile>

        <OutputFile id="Volts1_file0_10" fileName="/home/rokas/Golgi_network_2016/PyExamples/simulations/V2012_test1/sim3/Golgi_pop1_cell10.dat">
            <OutputColumn id="v10" quantity="Golgi_pop1/10/Very_Simple_Golgi_test_morph/v"/>
        </OutputFile>

        <OutputFile id="Volts1_file0_11" fileName="/home/rokas/Golgi_network_2016/PyExamples/simulations/V2012_test1/sim3/Golgi_pop1_cell11.dat">
            <OutputColumn id="v11" quantity="Golgi_pop1/11/Very_Simple_Golgi_test_morph/v"/>
        </OutputFile>

        <OutputFile id="Volts1_file0_12" fileName="/home/rokas/Golgi_network_2016/PyExamples/simulations/V2012_test1/sim3/Golgi_pop1_cell12.dat">
            <OutputColumn id="v12" quantity="Golgi_pop1/12/Very_Simple_Golgi_test_morph/v"/>
        </OutputFile>

        <OutputFile id="Volts1_file0_13" fileName="/home/rokas/Golgi_network_2016/PyExamples/simulations/V2012_test1/sim3/Golgi_pop1_cell13.dat">
            <OutputColumn id="v13" quantity="Golgi_pop1/13/Very_Simple_Golgi_test_morph/v"/>
        </OutputFile>

        <OutputFile id="Volts1_file0_14" fileName="/home/rokas/Golgi_network_2016/PyExamples/simulations/V2012_test1/sim3/Golgi_pop1_cell14.dat">
            <OutputColumn id="v14" quantity="Golgi_pop1/14/Very_Simple_Golgi_test_morph/v"/>
        </OutputFile>

    </Simulation>

</Lems>
