<neuroml xmlns="http://www.neuroml.org/schema/neuroml2"  xmlns:xs="http://www.w3.org/2001/XMLSchema" xmlns:xsi="http://www.w3.org/2001/XMLSchema-instance" xsi:schemaLocation="http://www.neuroml.org/schema/neuroml2 https://raw.github.com/NeuroML/NeuroML2/development/Schemas/NeuroML2/NeuroML_v2beta4.xsd" id="Simple_Golgi_Net">

    <poissonFiringSynapse id="poissonFiringSyn" synapse="syn0" averageRate="150 Hz" spikeTarget="./syn0"/>
    <expTwoSynapse id="syn0" erev="0mV" gbase="1nS" tauDecay="10ms" tauRise="0.5ms"/>
   <!-- <pulseGenerator id="Input_1" delay="200.0ms" duration="200.0ms" amplitude="-0.5E-5uA"/>
    <pulseGenerator id="Input_2" delay="800.0ms" duration="200.0ms" amplitude="4E-5uA"/>-->
    <network id="Simple_Golgi_Net_network" type="networkWithTemperature" temperature="23 degC" >
        <population id="Golgi_pop0" type="populationList" component="Simple_Golgi" size="10">
            <instance id="0">
                <location y="10.16916945706836" x="416.619872545341138" z="825.206509253743207"/>
            </instance>
            <instance id="1">
                <location y="368.411689488475702" x="298.639855199592773" z="193.661349045074246"/>
            </instance>
            <instance id="2">
                <location y="161.687823929368193" x="566.008168728861278" z="124.26688428353016"/>
            </instance>
            <instance id="3">
                <location y="562.078488075842984" x="432.936268009915921" z="174.343560723731798"/>
            </instance>
            <instance id="4">
                <location y="354.901386336598762" x="553.22108556932983" z="958.064785099548658"/>
            </instance>
            <instance id="5">
                <location y="978.639995570410065" x="91.29409887673512" z="412.119392939301008"/>
            </instance>
            <instance id="6">
                <location y="148.146168930189162" x="503.935368110037473" z="718.967140300885035"/>
            </instance>
            <instance id="7">
                <location y="341.56042577355214" x="189.971378721820344" z="23.521218142200539"/>
            </instance>
            <instance id="8">
                <location y="967.482458879871388" x="339.51777239792068" z="978.798454185656851"/>
            </instance>
            <instance id="9">
                <location y="3.454610755095566" x="744.530040141034647" z="940.238503097742864"/>
            </instance>
        </population>
        <projection id="Golgi_to_Golgi0" postsynapticPopulation="Golgi_pop0" presynapticPopulation="Golgi_pop0" synapse="syn0">
            <connection id="0" preCellId="../Golgi_pop0/0/Simple_Golgi" postCellId="../Golgi_pop0/2/Simple_Golgi"/>
            <connection id="1" preCellId="../Golgi_pop0/0/Simple_Golgi" postCellId="../Golgi_pop0/3/Simple_Golgi"/>
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        </projection>
       <!-- <inputList id="Input_list1" component="Input_1">
            <input destination="synapses" id="0" target="../Golgi_pop0/0/Simple_Golgi"/>
            <input destination="synapses" id="1" target="../Golgi_pop0/1/Simple_Golgi"/>
            <input destination="synapses" id="2" target="../Golgi_pop0/2/Simple_Golgi"/>
            <input destination="synapses" id="3" target="../Golgi_pop0/3/Simple_Golgi"/>
            <input destination="synapses" id="4" target="../Golgi_pop0/4/Simple_Golgi"/>
            <input destination="synapses" id="5" target="../Golgi_pop0/5/Simple_Golgi"/>
            <input destination="synapses" id="6" target="../Golgi_pop0/6/Simple_Golgi"/>
            <input destination="synapses" id="7" target="../Golgi_pop0/7/Simple_Golgi"/>
            <input destination="synapses" id="8" target="../Golgi_pop0/8/Simple_Golgi"/>
            <input destination="synapses" id="9" target="../Golgi_pop0/9/Simple_Golgi"/>
        </inputList>
        <inputList id="Input_list2" component="Input_2">
            <input destination="synapses" id="0" target="../Golgi_pop0/0/Simple_Golgi"/>
            <input destination="synapses" id="1" target="../Golgi_pop0/1/Simple_Golgi"/>
            <input destination="synapses" id="2" target="../Golgi_pop0/2/Simple_Golgi"/>
            <input destination="synapses" id="3" target="../Golgi_pop0/3/Simple_Golgi"/>
            <input destination="synapses" id="4" target="../Golgi_pop0/4/Simple_Golgi"/>
            <input destination="synapses" id="5" target="../Golgi_pop0/5/Simple_Golgi"/>
            <input destination="synapses" id="6" target="../Golgi_pop0/6/Simple_Golgi"/>
            <input destination="synapses" id="7" target="../Golgi_pop0/7/Simple_Golgi"/>
            <input destination="synapses" id="8" target="../Golgi_pop0/8/Simple_Golgi"/>
            <input destination="synapses" id="9" target="../Golgi_pop0/9/Simple_Golgi"/>
        </inputList>-->
       <inputList id="Input_list1" component="poissonFiringSyn">
            <input destination="synapses" id="0" target="../Golgi_pop0/0/Simple_Golgi"/>
            <input destination="synapses" id="1" target="../Golgi_pop0/1/Simple_Golgi"/>
            <input destination="synapses" id="2" target="../Golgi_pop0/2/Simple_Golgi"/>
            <input destination="synapses" id="3" target="../Golgi_pop0/3/Simple_Golgi"/>
            <input destination="synapses" id="4" target="../Golgi_pop0/4/Simple_Golgi"/>
            <input destination="synapses" id="5" target="../Golgi_pop0/5/Simple_Golgi"/>
            <input destination="synapses" id="6" target="../Golgi_pop0/6/Simple_Golgi"/>
            <input destination="synapses" id="7" target="../Golgi_pop0/7/Simple_Golgi"/>
            <input destination="synapses" id="8" target="../Golgi_pop0/8/Simple_Golgi"/>
            <input destination="synapses" id="9" target="../Golgi_pop0/9/Simple_Golgi"/>
        </inputList>
    </network>
</neuroml>
